*NODE, NSET=Nall
1, 0.000000, 0.000000, 0.000000
2, 0.400000, 0.000000, 0.000000
3, 0.800000, 0.000000, 0.000000
4, 1.200000, 0.000000, 0.000000
5, 1.600000, 0.000000, 0.000000
6, 2.000000, 0.000000, 0.000000
7, 2.400000, 0.000000, 0.000000
8, 2.800000, 0.000000, 0.000000
9, 3.200000, 0.000000, 0.000000
10, 3.600000, 0.000000, 0.000000
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*ELEMENT, TYPE=S4R, ELSET=Eall
1, 1, 2, 28, 27
2, 2, 3, 29, 28
3, 3, 4, 30, 29
4, 4, 5, 31, 30
5, 5, 6, 32, 31
6, 6, 7, 33, 32
7, 7, 8, 34, 33
8, 8, 9, 35, 34
9, 9, 10, 36, 35
10, 10, 11, 37, 36
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*MATERIAL, NAME=Glass
*ELASTIC
72000000000.0, 0.23
*SHELL SECTION, ELSET=Eall, MATERIAL=Glass, Offset=0
0.006
*NSET, NSET=BCXY
1
*NSET, NSET=BCY
651
*NSET, NSET=EDGENODES
1, 2, 3, 4, 5, 6, 7, 8, 9, 10, 11, 12, 13, 14, 15, 16,
17, 18, 19, 20, 21, 22, 23, 24, 25, 26, 27, 52, 53, 78, 79, 104,
105, 130, 131, 156, 157, 182, 183, 208, 209, 234, 235, 260, 261, 286, 287, 312,
313, 338, 339, 364, 365, 390, 391, 416, 417, 442, 443, 468, 469, 494, 495, 520,
521, 546, 547, 572, 573, 598, 599, 624, 625, 650, 651, 652, 653, 654, 655, 656,
657, 658, 659, 660, 661, 662, 663, 664, 665, 666, 667, 668, 669, 670, 671, 672,
673, 674, 675, 676,
*Surface, Name=TopSurface, Type=Element
Eall, S2
*STEP, NLGEOM
*STATIC
0.1, 1.0, 1e-8, 0.1
*Output, Frequency=1
*BOUNDARY, FIXED
BCXY, 1, 1
BCXY, 2, 2
*BOUNDARY, FIXED
BCY, 2, 2
*BOUNDARY, FIXED
EDGENODES, 3, 3
*DLOAD
Eall, P, -4000.0
*NODE FILE
U
*EL FILE
S
*NODE PRINT, NSET=Nall, FREQUENCY=9999
U
*EL PRINT, ELSET=Eall, FREQUENCY=9999
S
*END STEP
